# OpenSim document version 40000
InverseKinematicsTool generic:
  constraint_weight: Inf
  accuracy: 1e-5
  time_range: 0 2.533333
  report_errors: true
  marker_file: G:\Shared drives\sparseIK\Data\20231121_ScottWalking\MarkerData\walk_fixedMarkers_aligned.trc
  report_marker_locations: false
  IKTaskSet:
    IKMarkerTask C7: apply=true weight=5
    IKMarkerTask r_shoulder: apply=true weight=5
    IKMarkerTask l_shoulder: apply=true weight=5
    IKMarkerTask sternum: apply=false weight=5
    IKMarkerTask r_ASIS: apply=true weight=25
    IKMarkerTask l_ASIS: apply=true weight=25
    IKMarkerTask r_PSIS: apply=true weight=25
    IKMarkerTask l_PSIS: apply=true weight=25
    IKMarkerTask r_thigh1: apply=false weight=4
    IKMarkerTask r_thigh2: apply=false weight=4
    IKMarkerTask r_thigh3: apply=false weight=4
    IKMarkerTask r_knee: apply=true weight=30
    IKMarkerTask r_mknee: apply=true weight=30
    IKMarkerTask r_sh2: apply=false weight=4
    IKMarkerTask r_sh3: apply=false weight=4
    IKMarkerTask r_ankle: apply=true weight=30
    IKMarkerTask r_mankle: apply=true weight=30
    IKMarkerTask r_toe: apply=true weight=30
    IKMarkerTask r_5meta: apply=true weight=30
    IKMarkerTask r_calc: apply=true weight=60
    IKMarkerTask l_thigh1: apply=false weight=4
    IKMarkerTask l_thigh2: apply=false weight=4
    IKMarkerTask l_thigh3: apply=false weight=4
    IKMarkerTask l_knee: apply=true weight=30
    IKMarkerTask l_mknee: apply=true weight=30
    IKMarkerTask l_ankle: apply=true weight=30
    IKMarkerTask l_sh2: apply=false weight=4
    IKMarkerTask l_sh3: apply=false weight=4
    IKMarkerTask l_mankle: apply=true weight=30
    IKMarkerTask l_toe: apply=true weight=30
    IKMarkerTask l_calc: apply=true weight=60
    IKMarkerTask l_5meta: apply=true weight=30
    IKMarkerTask r_melbow: apply=true weight=5
    IKMarkerTask r_elbow: apply=true weight=5
    IKMarkerTask r_wrist_radius: apply=true weight=5
    IKMarkerTask r_wrist_ulna: apply=true weight=5
    IKMarkerTask l_melbow: apply=true weight=5
    IKMarkerTask l_elbow: apply=true weight=5
    IKMarkerTask l_wrist_radius: apply=true weight=5
    IKMarkerTask l_wrist_ulna: apply=true weight=5
